f(x) := (x + 1)^2/(x - 2)
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root(f(x), x, -4, 0) → -1
limit(f(x), x → 2+) → ∞
limit(f(x), x → 2-) → -∞
k := limit(f(x)/x, x → ∞) → 1
b := limit(f(x) - k*x, x → ∞) → 4
d(x) := d/dx(f(x)) → (2*x + 2)/(x - 2) - (x + 1)^2/(x - 2)^2
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root(d(x), x, -4, 0) → -1
root(d(x), x, 3, 7) → 5
d(-5) = 0.816327
d(0) = -1.25
d(6) = 0.4375
d2(x) := d/dx(d(x)) → 2*(x + 1)^2/(x - 2)^3 - 2*(2*x + 2)/(x - 2)^2 + 2/(x - 2)
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mod(27, 13) → 1
