P(x) := -51*x^5 + 151*x^4 - 95*x^3 + 2*x^2 + 5
(9*x^6 - 25*x^5 + 22*x^4 - 6*x^3 + x^2 - x) factor → x*(9*x^2 + 2*x + 1)*(x - 1)^3
(-51*x^5 + 151*x^4 - 95*x^3 + 2*x^2 + 5)/(9*x^6 - 25*x^5 + 22*x^4 - 6*x^3 + x^2 - x) parfrac, x → (3*x - 8)/(9*x^2 + 2*x + 1) - 5/x - 1/(x - 1) + 3/(x - 1)^2 + 1/(x - 1)^3
integral((3*x - 8)/(9*x^2 + 2*x + 1) - 5/x - 1/(x - 1) + 3/(x - 1)^2 + 1/(x - 1)^3, x) → 5/(2*(x^2 - 2*x + 1)) - 5*ln(x)/(x^2 - 2*x + 1) - 3*x/(x^2 - 2*x + 1) + ln((x + 1/9)^2 + 8/81)/(6*(x^2 - 2*x + 1)) - ln(x - 1)/(x^2 - 2*x + 1) - x*ln((x + 1/9)^2 + 8/81)/(3*(x^2 - 2*x + 1)) + 2*x*ln(x - 1)/(x^2 - 2*x + 1) - 5*x^2*ln(x)/(x^2 - 2*x + 1) + x^2*ln((x + 1/9)^2 + 8/81)/(6*(x^2 - 2*x + 1)) - x^2*ln(x - 1)/(x^2 - 2*x + 1) + 10*x*ln(x)/(x^2 - 2*x + 1) - 25*sqrt(2)*(2*atan(9*sqrt(2)*(x + 1/9)/4) - π)/(24*(x^2 - 2*x + 1)) + 25*sqrt(2)*x*(2*atan(9*sqrt(2)*(x + 1/9)/4) - π)/(12*(x^2 - 2*x + 1)) - 25*sqrt(2)*x^2*(2*atan(9*sqrt(2)*(x + 1/9)/4) - π)/(24*(x^2 - 2*x + 1))
integral((3*x - 8)/(9*x^2 + 2*x + 1), x) - integral(5/x, x) - integral(1/(x - 1), x) + integral(3/(x - 1)^2, x) + integral(1/(x - 1)^3, x) → ln((x + 1/9)^2 + 8/81)/6 - ln(x - 1) - 5*ln(x) - 25*sqrt(2)*(2*atan(9*sqrt(2)*(x + 1/9)/4) - π)/24 - 3/(x - 1) - 1/(2*(x - 1)^2)
